// SBML level 2 version 2

model simple_l2v2()
  // EnzymaticReaction

  // Compartments:
  compartment cell = 190;
  compartment m1 in cell = 0.013;
  compartment m2 in cell = 0.013;
  compartment m3 in cell = 0.013;
  compartment m4 in cell = 0.013;
  compartment cytosol = 1e-14;

  // Species:
  species E in cytosol = 5e-21/cytosol;
  species ES in cytosol = 0;
  species P in cytosol = 0;
  species S in cytosol = 1e-20/cytosol;

  // Parameters:
  k = 0;
  k2 = 0;
  k3 = 0;
  vcat_kcat = 0.1;
  veq_koff = 0.2;
  veq_kon = 1000000;
  x = 0;

  // Reactions:
  vcat: ES => E + P; cytosol*vcat_kcat*ES;
  veq: E + S -> ES; cytosol*(veq_kon*E*S - veq_koff*ES);
end
